# OpenSim document version 40000
Model:
  Ground
  BodySet:
    Body upper_arm: mass=1.905 [kg] mass_center=(0.01806 -0.1805 -0.01275)
        inertia=(0.01165 -0.00035 -0.00023 0.00191 0.00123 0.01258)
      PhysicalOffsetFrame upper_arm_offset: socket_parent=.. translation=(0.0061 -0.2904 -0.0123) [meters]
      WrapEllipsoid elbow_ellipse: xyz_body_rotation=(-0.128631 0.137532 0.0307178) translation=(0.0019 -0.289 -0.014)
          quadrant=x dimensions=(0.015 0.015 0.1)
      WrapCylinder tricep_cylinder: xyz_body_rotation=(-0.14015 -0.00628319 0.154985)
          translation=(0.0028 -0.2919 -0.0119) quadrant=all radius=0.016 length=0.1
      WrapEllipsoid bicep_ellipse: xyz_body_rotation=(-2.00434 -1.00164 0.975465) translation=(0.0033 0.005 0.0003)
          quadrant=-y dimensions=(0.025 0.02 0.02)
    Body lower_arm: mass=1.1053 mass_center=(0.00972 -0.09595 0.02429)
        inertia=(0.00541 0.00032 -8e-5 0.00115 0.00109 0.00494)
      PhysicalOffsetFrame lower_arm_offset: socket_parent=.. translation=(0.0004 -0.011503 0.019999)
          orientation=(0 -0.5 0) [radians]
  JointSet:
    BallJoint shoulder: socket_parent_frame=/ground socket_child_frame=/bodyset/upper_arm
      Coordinate shoulder_coord_0: default_value=0 locked=true
      Coordinate shoulder_coord_1: default_value=0 locked=true
      Coordinate shoulder_coord_2: default_value=0 locked=true
    CustomJoint elbow: socket_parent_frame=/bodyset/upper_arm/upper_arm_offset socket_child_frame=/bodyset/lower_arm
      Coordinate elbow_flexion: range=(0 2.268928)
      SpatialTransform:
        TransformAxis rotation1: coordinates=elbow_flexion axis=(0.04940001 0.03660001 0.9981083)
            LinearFunction(coefficients=1 0)
        TransformAxis rotation2: axis=(0 1 0)
        TransformAxis rotation3: axis=(0 0 1)
        TransformAxis translation1: axis=(1 0 0)
        TransformAxis translation2: axis=(0 1 0)
        TransformAxis translation3: axis=(0 0 1)
  ForceSet:
    Millard2012EquilibriumMuscle TriLat: min_control=0.01 max_control=1 max_isometric_force=2490
        optimal_fiber_length=0.1138 tendon_slack_length=0.098 pennation_angle_at_optimal=0.1570796 [radians]
      PathPoint P1: upper_arm (-0.00599 -0.12646 0.00428)
      PathPoint P2: upper_arm (-0.02344 -0.14528 0.00928)
      PathPoint P3: upper_arm (-0.03184 -0.22637 -0.01217)
      PathPoint P4: upper_arm (-0.01743 -0.26757 -0.01208)
      PathPoint P5: lower_arm (-0.0219 0.01046 -0.00078)
      PathWrap: wrap_object=tricep_cylinder method=hybrid
      ActiveForceLengthCurve: minimum_value=0
      ForceVelocityCurve: concentric_slope_at_vmax=0 concentric_slope_near_vmax=0.25 isometric_slope=5
          eccentric_slope_at_vmax=0 eccentric_slope_near_vmax=0.15 max_eccentric_velocity_force_multiplier=1.4
      FiberForceLengthCurve
      TendonForceLengthCurve
    Millard2012EquilibriumMuscle BicLong: min_control=0.01 max_control=1 max_isometric_force=2674.87
        optimal_fiber_length=0.1157 tendon_slack_length=0.2723 pennation_angle_at_optimal=0
      PathPoint P1: upper_arm (-0.01498973 -0.008301891 -0.01305)
      PathPoint P2: upper_arm (-0.02094 0.00694952 -0.00461)
      PathPoint P3: upper_arm (0.02131 0.01793 0.01028)
      PathPoint P4: upper_arm (0.02378 -0.00511 0.01201)
      PathPoint P5: upper_arm (0.01345 -0.02827 0.00136)
      PathPoint P6: upper_arm (0.01068 -0.07736 -0.00165)
      PathPoint P7: upper_arm (0.01703 -0.12125 0.00024)
      PathPoint P8: upper_arm (0.0228 -0.1754 -0.0063)
      PathPoint P11: lower_arm (-0.002 -0.0375 -0.002)
      PathWrap: wrap_object=elbow_ellipse method=hybrid
      PathWrap pathwrap_0: wrap_object=bicep_ellipse method=hybrid
      ActiveForceLengthCurve: minimum_value=0
      ForceVelocityCurve: concentric_slope_at_vmax=0 concentric_slope_near_vmax=0.25 isometric_slope=5
          eccentric_slope_at_vmax=0 eccentric_slope_near_vmax=0.15 max_eccentric_velocity_force_multiplier=1.4
      FiberForceLengthCurve
      TendonForceLengthCurve
